V_IN_MAX := 36 V
V_OUT := 12 V
L := 4.7 μH
V_IN_NOM := 24 V
I_OUT_MAX := 10 A
η := 95%
V_IN_MIN := 13 V
F_SW := 440 kHz
D_MIN := V_OUT/V_IN_MAX*η = 0.316667
D_NOM := V_OUT/V_IN_NOM*η = 0.475
D_MAX := V_OUT/V_IN_MIN*η = 0.876923
I_AC := V_OUT*(1 - D_MIN)/(2*L*F_SW) = 1.98259 A
ΔI_L := 2*I_AC = 3.96518 A
r := ΔI_L/I_OUT_MAX = 0.396518
